<neuroml xmlns="http://www.neuroml.org/schema/neuroml2"
    xmlns:xsi="http://www.w3.org/2001/XMLSchema-instance"
    xsi:schemaLocation="http://www.neuroml.org/schema/neuroml2 http://neuroml.svn.sourceforge.net/viewvc/neuroml/NeuroML2/Schemas/NeuroML2/NeuroML_v2alpha.xsd"
    id="Olfactory_System">
    <expOneSynapse id="syn_osn" erev="0mV" gbase="65nS" tauDecay="3ms"/>
    <expOneSynapse id="syn_pn" erev="0mV" gbase="65nS" tauDecay="3ms"/>
    <iafCell id="osn" reset="-70mV" C="0.03 nF" thresh="-25mV" leakConductance="1 uS" leakReversal="-50mV"/>
    <iafCell id="osn" reset="-70mV" C="0.03 nF" thresh="-25mV" leakConductance="1 uS" leakReversal="-50mV"/>
    <network id="Olfactory_System">
        <population id="7a_l" component="osn" size="17"/>
        <population id="DA41_l" component="osn" size="10"/>
        <population id="7a_r" component="osn" size="17"/>
        <population id="DA41_r" component="osn" size="10"/>
        <population id="9a_l" component="osn" size="3"/>
        <population id="VM2_l" component="osn" size="10"/>
        <population id="9a_r" component="osn" size="3"/>
        <population id="VM2_r" component="osn" size="10"/>
        <population id="43b_l" component="osn" size="2"/>
        <population id="VM3_l" component="osn" size="10"/>
        <population id="43b_r" component="osn" size="2"/>
        <population id="VM3_r" component="osn" size="10"/>
        <population id="10a_l" component="osn" size="14"/>
        <population id="VA1lm_l" component="osn" size="10"/>
        <population id="10a_r" component="osn" size="14"/>
        <population id="VA1lm_r" component="osn" size="10"/>
        <population id="22a_l" component="osn" size="4"/>
        <population id="VM5d_l" component="osn" size="10"/>
        <population id="22a_r" component="osn" size="4"/>
        <population id="VM5d_r" component="osn" size="10"/>
        <population id="67a_l" component="osn" size="11"/>
        <population id="DL3_l" component="osn" size="10"/>
        <population id="67a_r" component="osn" size="11"/>
        <population id="DL3_r" component="osn" size="10"/>
        <population id="67c_l" component="osn" size="6"/>
        <population id="VC1_l" component="osn" size="10"/>
        <population id="67c_r" component="osn" size="6"/>
        <population id="VC1_r" component="osn" size="10"/>
        <population id="47b_l" component="osn" size="47"/>
        <population id="DL1_l" component="osn" size="10"/>
        <population id="47b_r" component="osn" size="47"/>
        <population id="DL1_r" component="osn" size="10"/>
        <population id="47a_l" component="osn" size="1"/>
        <population id="VC3_l" component="osn" size="10"/>
        <population id="47a_r" component="osn" size="1"/>
        <population id="VC3_r" component="osn" size="10"/>
        <population id="35a_l" component="osn" size="17"/>
        <population id="VC4_l" component="osn" size="10"/>
        <population id="35a_r" component="osn" size="17"/>
        <population id="VC4_r" component="osn" size="10"/>
        <population id="82a_l" component="osn" size="16"/>
        <population id="DL5_l" component="osn" size="10"/>
        <population id="82a_r" component="osn" size="16"/>
        <population id="DL5_r" component="osn" size="10"/>
        <population id="43a_l" component="osn" size="21"/>
        <population id="VA6_l" component="osn" size="10"/>
        <population id="43a_r" component="osn" size="21"/>
        <population id="VA6_r" component="osn" size="10"/>
        <population id="23a_l" component="osn" size="9"/>
        <population id="VA5_l" component="osn" size="10"/>
        <population id="23a_r" component="osn" size="9"/>
        <population id="VA5_r" component="osn" size="10"/>
        <population id="49b_l" component="osn" size="8"/>
        <population id="VA1d_l" component="osn" size="10"/>
        <population id="49b_r" component="osn" size="8"/>
        <population id="VA1d_r" component="osn" size="10"/>
        <population id="88a_l" component="osn" size="26"/>
        <population id="DA4m_l" component="osn" size="10"/>
        <population id="88a_r" component="osn" size="26"/>
        <population id="DA4m_r" component="osn" size="10"/>
        <population id="59b_l" component="osn" size="2"/>
        <population id="DA3_l" component="osn" size="10"/>
        <population id="59b_r" component="osn" size="2"/>
        <population id="DA3_r" component="osn" size="10"/>
        <population id="19a_l" component="osn" size="29"/>
        <population id="DC1_l" component="osn" size="10"/>
        <population id="19a_r" component="osn" size="29"/>
        <population id="DC1_r" component="osn" size="10"/>
        <population id="33b_l" component="osn" size="25"/>
        <population id="DM2_l" component="osn" size="10"/>
        <population id="33b_r" component="osn" size="25"/>
        <population id="DM2_r" component="osn" size="10"/>
        <population id="65a_l" component="osn" size="18"/>
        <population id="DM3_l" component="osn" size="10"/>
        <population id="65a_r" component="osn" size="18"/>
        <population id="DM3_r" component="osn" size="10"/>
        <population id="85f_l" component="osn" size="7"/>
        <population id="DM4_l" component="osn" size="10"/>
        <population id="85f_r" component="osn" size="7"/>
        <population id="DM4_r" component="osn" size="10"/>
        <population id="2a_l" component="osn" size="8"/>
        <population id="DM5_l" component="osn" size="10"/>
        <population id="2a_r" component="osn" size="8"/>
        <population id="DM5_r" component="osn" size="10"/>
        <population id="85b_l" component="osn" size="13"/>
        <population id="DM6_l" component="osn" size="10"/>
        <population id="85b_r" component="osn" size="13"/>
        <population id="DM6_r" component="osn" size="10"/>
        <synapticConnection to="DA41_l[0]" synapse="syn_osn" from="7a_l[0]"/>
        <synapticConnection to="DA41_r[0]" synapse="syn_osn" from="7a_l[0]"/>
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    </network>
</neuroml>
